<Lems xmlns="http://www.neuroml.org/lems/0.6"
      xmlns:xsi="http://www.w3.org/2001/XMLSchema-instance"
      xsi:schemaLocation="http://www.neuroml.org/lems/0.6 https://raw.github.com/LEMS/LEMS/master/Schemas/LEMS/LEMS_v0.6.xsd">

<!--

    Definition in LEMS of a new ComponentType for the modified Izhikevich model in Ferguson KA, Huh CYL, Amilhon B, Williams S, Skinner FK (2013)
-->

<!--
Already defined...

<Dimension name="per_voltage" m="-1" l="-2" t="3" i="1"/>
<Dimension name="conductance" m="-1" l="-2" t="3" i="2"/>
-->

<Dimension name="conductance_per_voltage" m="-2" l="-4" t="6" i="3"/>

<Unit symbol="nS_per_mV" dimension="conductance_per_voltage" power="-6"/>

<ComponentType name="izhikevichFergusonCell"
        extends="baseCellMembPotCap"
        description="Cell based on the modified Izhikevich model in Ferguson KA, Huh CYL, Amilhon B, Williams S, Skinner FK (2013) ">

        <Parameter name="v0" dimension="voltage"/>

        <!--
        Defined in baseCellMembPotCap:

        <Parameter name="C" dimension="capacitance"/>
        -->
        <Parameter name="vr" dimension="voltage"/>
        <Parameter name="vpeak" dimension="voltage"/>
        <Parameter name="vt" dimension="voltage"/>
        <Parameter name="c" dimension="voltage"/>
        <Parameter name="klow" dimension="conductance_per_voltage"/>
        <Parameter name="khigh" dimension="conductance_per_voltage"/>
        <Parameter name="a" dimension="per_time"/>
        <Parameter name="b" dimension="conductance"/>
        <Parameter name="d" dimension="current"/>

        <Attachments name="synapses" type="basePointCurrent"/>

        <Exposure name="u" dimension="current"/>
        <Exposure name="k" dimension="conductance_per_voltage"/>

        <Dynamics>

            <StateVariable name="v" dimension="voltage" exposure="v"/>
            <StateVariable name="u" dimension="current" exposure="u"/>

            <DerivedVariable name="iSyn"  dimension="current" exposure="iSyn" select="synapses[*]/i" reduce="add" />
            <!-- TODO: Investigate why this fails:

            <DerivedVariable name="iMemb" dimension="current" exposure="iMemb" value="k * (v-vr) * (v-vt) + iSyn - u"/>

            ConditionalDerivedVariable not seen from DerivedVariable?
            See https://github.com/LEMS/jLEMS/issues/68
            -->

            <ConditionalDerivedVariable name="k" exposure="k" dimension="conductance_per_voltage">
                <Case condition="v .lt. vt" value="klow"/>
                <Case value="khigh"/>
            </ConditionalDerivedVariable>

            <TimeDerivative variable="v" value="(k * (v-vr) * (v-vt) + iSyn - u) / C"/>
            <TimeDerivative variable="u" value="a * (b * (v-vr) - u)"/>

            <OnStart>
                <StateAssignment variable="v" value="v0"/>
                <StateAssignment variable="u" value="0"/>
            </OnStart>

            <OnCondition test="v .gt. vpeak">
                <StateAssignment variable="v" value="c"/>
                <StateAssignment variable="u" value="u + d"/>
                <EventOut port="spike"/>
            </OnCondition>

        </Dynamics>

    </ComponentType>

</Lems>
